β := 3  # Варинат 9. Распределение: Бирнбауна-Саундерса
θ := 3700
# 1. Построить график функции плотности распределения наработки объекта до отказа.
f(x) :=
    sqrt(x/θ)*sqrt(θ/x)/(2*β*x*sqrt(2*π))*e^(-(((sqrt(x/θ) - sqrt(θ/x))^2)/(2*β^2))) if x > 0
    0 otherwise
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# 2. Вероятность безотказной работы в течении наработчки ч.
F(t) := integral(f(x), x = 0 .. t)
Ρ(t) := 1 - F(t)
Ρ(3000) = 0.841295
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# 3. Вероятность безотказной работы объекта в интервале наработки от 1000 до 3500 ч.
Τ1 := 2500
Τ2 := 4700
ΡΡ := Ρ(Τ2)/Ρ(Τ1)
ΡΡ = 0.950921
# 4. Среднюю наработку до отказа.
Τ := integral(Ρ(t), t = 0 .. 9999999)
Τ = 6552106
Ρ
# 5. Гамма - процентную наработку до отказа для γ = 95%.
ty := 3000
Given
F(ty) == 1 - 0.95
Find(ty) = 493.681
# 6. Определить и построить график функции интенсивности отказов.
λ(t) := f(t)/Ρ(3000)
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# 7. Вероятность безотказной работы объекта, определяемую по его остаточной наработке (интересующая наработка - ч, момент технического осмотра - ч).
Ρt := Ρ(4700 + 2500)/Ρ(4700)
Ρt = 0.965487
ft(x) := f(4700 + x)/Ρ(4700)
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# 8. Среднюю остаточную наработку до отказа (момент технического осмотра - ч).
Τt := integral(x*ft(x), x = 0 .. 9999999)
Τt = 4734.95
