# Варинат 9. Распределение А : Бирнбаума-Саундерса
β := 3
θ := 6700
# 1. Построить график функции плотности распределения наработки объекта до отказа.
f(x) :=
    sqrt(x/θ)*sqrt(θ/x)/(2*β*x*sqrt(2*π))*e^(-(((sqrt(x/θ) - sqrt(θ/x))^2)/(2*β^2))) if x > 0
    0 otherwise
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# Вероятность безотказной работы в течении наработчки ч.
F(t) := integral(f(x), x = 0 .. t)
Ρ(t) := 1 - F(t)
Ρ(6700) = 0.827362
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# 2. Средний ресурс объекта tp.
tp := integral(t*f(t), t = 0 .. ∞)
tp = 8805.15
# 3. Гамма - процентный ресурс объекта tpγ1 для γ = 90%.
ty1 := 2700
Given
F(ty1) == 1 - 0.90
Find(ty1) = 2187.17
# 4. Гамма - процентный ресурс объекта tpγ2 для γ = 95%.
ty2 := 2700
Given
F(ty2) == 1 - 0.95
Find(ty2) = 893.962
# 5. График функции плотности распределния срока службы объекта.
# Распределение В : Логнормальное
μ := 3
σ := 7
ϕ(x) :=
    1/(σ*x*sqrt(2*π))*e^(-((ln(x) - μ)^2/(2*σ^2))) if x > 0
    0 otherwise
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# Вероятность безотказной работы в течении наработчки ч.
F1(t) := integral(ϕ(x), x = 0 .. t)
Ρ1(t) := 1 - F1(t)
Ρ1(7) = 0.559907
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# 6. Средний срок службы объекта tc.
tc := integral(x*ϕ(x), x = 0 .. 999999)
tc = 21488.3
# 7. Гамма - процентный срок службы объекта tpγ для γ = 95%.
ty := 7
Given
F1(ty) == 1 - 0.95
Find(ty) = 0.000200647
