# Варинат 9. Распределение: Реэля
β := 7
# 1. Построить график функции плотности распределения времени востоновления работоспособности системы
f(x) :=
    x/β^2*e^(-(x^2/(2*β^2))) if x > 0
    0 otherwise
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# Вероятность безотказной работы в течении наработчки ч.
F(t) := integral(f(x), x = 0 .. t)
Ρ(t) := 1 - F(t)
Ρ(7) = 0.606531
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# 2. Среднее время восстановления tv.
tv := integral(t*f(t), t = 0 .. ∞)
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tv = 8.7732
# 3. Вероятность восстановления в течении t Pv(t).
Pv(t) := integral(f(t), t = 0 .. t)
Pv(7) = 0.393469
# 4. Гамма-процентное время восстановления tvy для γ=95%.
ty := 7
Given
F(ty) == 1 - 0.95
Find(ty) = 2.24204
# 5. График функции интенсивности восстановления системы μ(t).
μ(t) := f(t)/(1 - Pv(7))
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